# Ханаев Михаил | Вариант 49
# МО1;  3 ПОДГРУППА
# Задание №1
a := 2
b := 3
y := (a^2 + b^2)/nthroot(a*b, 3) = 7.15418
# Задание 2
x := 4.13, 4.23 .. 5.43
f(x) := log(ln(x)) + ln(log(x))
f(x) = [-0.332828; -0.308835; -0.285784; -0.263611; -0.24226; -0.221678; -0.201818; -0.182636; -0.164093; -0.146152; -0.128779; -0.111944; -0.095617; -0.0797724]
# Задание 3
2^(3^(4^sqrt(15))) > 3^(2^(5^sqrt(13))) =  # error: Найдено число величиной более 10^307, попробую оценить это выражение.
ln(2)^(3^(4^sqrt(15))) > ln(3)^(2^(5^sqrt(13))) =  # error  # числа получаются больше, чем 10^307 и маткад жалуется, поэтому я два раза логарифмирую
4^sqrt(15)*ln(3)*ln(2) > 5^sqrt(13)*ln(2)*ln(3) = 0
# Задание 4
x := 0.01 .. 3.50
g(x) := sin(x)/x + 1
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# Задание 5
x := 1
Given
7*x^5 + 2^3 + 3*x == 19
polyroots([-900; 13; 0; 3; 0; 7]) = [-2.11681 + 1.59029i; -2.11681 - 1.59029i; 0.822301 + 2.53143i; 0.822301 - 2.53143i; 2.58902]
c := Find(x)
c = 1.02512
x := 1
Given
ln(x) - x == -3
c := Find(x)
c = 4.50524
