# Ханаев Михаил 1МО
# 49 вариант
# Задание №1
n := 7
i := 0 .. n
j := 0 .. n
M[i, j] :=
    (i + j) if i ≠ j
    (2*i + 0.1) if i == j
M = [
    0.1, 1, 2, 3, 4, 5, 6, 7;
    1, 2.1, 3, 4, 5, 6, 7, 8;
    2, 3, 4.1, 5, 6, 7, 8, 9;
    3, 4, 5, 6.1, 7, 8, 9, 10;
    4, 5, 6, 7, 8.1, 9, 10, 11;
    5, 6, 7, 8, 9, 10.1, 11, 12;
    6, 7, 8, 9, 10, 11, 12.1, 13;
    7, 8, 9, 10, 11, 12, 13, 14.1
]
k := 0 .. n
V[k] := k^2
V = [0; 1; 4; 9; 16; 25; 36; 49]
# Задание №2
|M| = -0.00033039
|M^2| = 1.09158e-7
M^-1 = [
    5.76258, -3.38691, -2.5364, -1.68589, -0.835376, 0.0151336, 0.865644, 1.71615;
    -3.38691, 7.22147, -2.17016, -1.56179, -0.953419, -0.345047, 0.263325, 0.871697;
    -2.5364, -2.17016, 8.19607, -1.43769, -1.07146, -0.705227, -0.338993, 0.0272405;
    -1.68589, -1.56179, -1.43769, 8.6864, -1.1895, -1.06541, -0.941312, -0.817216;
    -0.835376, -0.953419, -1.07146, -1.1895, 8.69245, -1.42559, -1.54363, -1.66167;
    0.0151336, -0.345047, -0.705227, -1.06541, -1.42559, 8.21423, -2.14595, -2.50613;
    0.865644, 0.263325, -0.338993, -0.941312, -1.54363, -2.14595, 7.25173, -3.35059;
    1.71615, 0.871697, 0.0272405, -0.817216, -1.66167, -2.50613, -3.35059, 5.80496
]
cond2(M) = 615.664
# Задание №3
X := M^-1*V
X = [73.5615; 12.7967; -27.9682; -48.733; -49.4979; -30.2627; 8.97243; 68.2076]
lsolve(M, V) = [73.5615; 12.7967; -27.9682; -48.733; -49.4979; -30.2627; 8.97243; 68.2076]
# Задание №4
N := identity(6)
|M^-1 - M| - |N| = -300175219
# Задание №5
M*X - V = [-1.13687e-13; 0; 0; -1.13687e-13; -1.13687e-13; -2.27374e-13; -1.13687e-13; -2.27374e-13]
# Задание №6
m := 9
t := 1 .. m
f := 1 .. m
en := 1
o(t, f) :=
    (3*t + f) if t ≠ f
    (t + f) if (t == f)
s(t, f) :=
    ((t + 2*f)*1) if t < f
    0 if t ≥ f
S := matrix(m, m, s) = [
    0, 2, 4, 6, 8, 10, 12, 14, 16;
    0, 0, 5, 7, 9, 11, 13, 15, 17;
    0, 0, 0, 8, 10, 12, 14, 16, 18;
    0, 0, 0, 0, 11, 13, 15, 17, 19;
    0, 0, 0, 0, 0, 14, 16, 18, 20;
    0, 0, 0, 0, 0, 0, 17, 19, 21;
    0, 0, 0, 0, 0, 0, 0, 20, 22;
    0, 0, 0, 0, 0, 0, 0, 0, 23;
    0, 0, 0, 0, 0, 0, 0, 0, 0
]
D := transpose(S) = [
    0, 0, 0, 0, 0, 0, 0, 0, 0;
    2, 0, 0, 0, 0, 0, 0, 0, 0;
    4, 5, 0, 0, 0, 0, 0, 0, 0;
    6, 7, 8, 0, 0, 0, 0, 0, 0;
    8, 9, 10, 11, 0, 0, 0, 0, 0;
    10, 11, 12, 13, 14, 0, 0, 0, 0;
    12, 13, 14, 15, 16, 17, 0, 0, 0;
    14, 15, 16, 17, 18, 19, 20, 0, 0;
    16, 17, 18, 19, 20, 21, 22, 23, 0
]
o(t, f) :=
    S[t, f] if t < f
    (t + 2*f + 100) if t == f
    D[t, f] if t > f
N := matrix(m, m, o)
r(t, en) := t^2
W := matrix(m, 1, r)
N = [
    100, 2, 4, 6, 8, 10, 12, 14, 16;
    2, 103, 5, 7, 9, 11, 13, 15, 17;
    4, 5, 106, 8, 10, 12, 14, 16, 18;
    6, 7, 8, 109, 11, 13, 15, 17, 19;
    8, 9, 10, 11, 112, 14, 16, 18, 20;
    10, 11, 12, 13, 14, 115, 17, 19, 21;
    12, 13, 14, 15, 16, 17, 118, 20, 22;
    14, 15, 16, 17, 18, 19, 20, 121, 23;
    16, 17, 18, 19, 20, 21, 22, 23, 124
]
W = [0; 1; 4; 9; 16; 25; 36; 49; 64]
|N| = 1.81325e18
# Решим систему: | Погрешность:
X := N^-1*W
|N*X| - |W| = 0
X = [-0.142858; -0.137767; -0.111299; -0.0637174; 0.0045011; 0.0926746; 0.199921; 0.325169; 0.467165]
N*X - W = [8.88178e-16; -4.44089e-15; 1.77636e-15; -3.55271e-15; 3.55271e-15; 0; 0; 0; 0]
# Задание №7
p := cholesky(N)
p = [
    10, 0, 0, 0, 0, 0, 0, 0, 0;
    0.2, 10.1469, 0, 0, 0, 0, 0, 0, 0;
    0.4, 0.484876, 10.2764, 0, 0, 0, 0, 0, 0;
    0.6, 0.678038, 0.723134, 10.3758, 0, 0, 0, 0, 0;
    0.8, 0.8712, 0.900856, 0.894181, 10.4398, 0, 0, 0, 0;
    1, 1.06436, 1.07858, 1.05036, 0.992533, 10.4697, 0, 0, 0;
    1.2, 1.25752, 1.2563, 1.20655, 1.12395, 1.02425, 10.4705, 0, 0;
    1.4, 1.45069, 1.43402, 1.36273, 1.25537, 1.1301, 1.00105, 10.4483, 0;
    1.6, 1.64385, 1.61174, 1.51891, 1.38678, 1.23596, 1.08216, 0.935387, 10.4085
]
p*transpose(p) = [
    100, 2, 4, 6, 8, 10, 12, 14, 16;
    2, 103, 5, 7, 9, 11, 13, 15, 17;
    4, 5, 106, 8, 10, 12, 14, 16, 18;
    6, 7, 8, 109, 11, 13, 15, 17, 19;
    8, 9, 10, 11, 112, 14, 16, 18, 20;
    10, 11, 12, 13, 14, 115, 17, 19, 21;
    12, 13, 14, 15, 16, 17, 118, 20, 22;
    14, 15, 16, 17, 18, 19, 20, 121, 23;
    16, 17, 18, 19, 20, 21, 22, 23, 124
]
transpose(p) = [
    10, 0.2, 0.4, 0.6, 0.8, 1, 1.2, 1.4, 1.6;
    0, 10.1469, 0.484876, 0.678038, 0.8712, 1.06436, 1.25752, 1.45069, 1.64385;
    0, 0, 10.2764, 0.723134, 0.900856, 1.07858, 1.2563, 1.43402, 1.61174;
    0, 0, 0, 10.3758, 0.894181, 1.05036, 1.20655, 1.36273, 1.51891;
    0, 0, 0, 0, 10.4398, 0.992533, 1.12395, 1.25537, 1.38678;
    0, 0, 0, 0, 0, 10.4697, 1.02425, 1.1301, 1.23596;
    0, 0, 0, 0, 0, 0, 10.4705, 1.00105, 1.08216;
    0, 0, 0, 0, 0, 0, 0, 10.4483, 0.935387;
    0, 0, 0, 0, 0, 0, 0, 0, 10.4085
]
# Задание №8
N^98 = [
    1.31115e230, 1.4622e230, 1.62447e230, 1.79923e230, 1.9878e230, 2.19165e230, 2.41233e230, 2.65154e230, 2.91112e230;
    1.4622e230, 1.63064e230, 1.81161e230, 2.0065e230, 2.2168e230, 2.44413e230, 2.69023e230, 2.957e230, 3.24648e230;
    1.62447e230, 1.81161e230, 2.01266e230, 2.22918e230, 2.46282e230, 2.71538e230, 2.98879e230, 3.28517e230, 3.60678e230;
    1.79923e230, 2.0065e230, 2.22918e230, 2.46899e230, 2.72776e230, 3.00749e230, 3.31032e230, 3.63857e230, 3.99478e230;
    1.9878e230, 2.2168e230, 2.46282e230, 2.72776e230, 3.01365e230, 3.3227e230, 3.65727e230, 4.01993e230, 4.41348e230;
    2.19165e230, 2.44413e230, 2.71538e230, 3.00749e230, 3.3227e230, 3.66344e230, 4.03231e230, 4.43217e230, 4.86607e230;
    2.41233e230, 2.69023e230, 2.98879e230, 3.31032e230, 3.65727e230, 4.03231e230, 4.43834e230, 4.87845e230, 5.35604e230;
    2.65154e230, 2.957e230, 3.28517e230, 3.63857e230, 4.01993e230, 4.43217e230, 4.87845e230, 5.36221e230, 5.88716e230;
    2.91112e230, 3.24648e230, 3.60678e230, 3.99478e230, 4.41348e230, 4.86607e230, 5.35604e230, 5.88716e230, 6.4635e230
]
