# Ханаев Михаил 1МО
# Вариант 49
# Задание 1
N := 4
M := 5
ORIGIN := 1
i := 1 .. N
j := 1 .. M
K[i, j] := i*i + 1 + 2*j
B := transpose(K) = [4, 7, 12, 19; 6, 9, 14, 21; 8, 11, 16, 23; 10, 13, 18, 25; 12, 15, 20, 27]
C :=
    for i ∈ 1 .. M
        sum ← 0
        for j ∈ 1 .. N
            sum ← sum + B[i, j]
            V[i] ← sum/M
    V
K = [4, 6, 8, 10, 12; 7, 9, 11, 13, 15; 12, 14, 16, 18, 20; 19, 21, 23, 25, 27]
C = [8.4; 10; 11.6; 13.2; 14.8]
# Задание 2
ORIGIN := 1
n := 6
m := 8
i := 1 .. n
j := 1 .. m
L[i, j] := round(rnd(n*m) + 1)
SR := mean(L) = 25.1458
P(L) :=
    for i ∈ 1 .. n
        Sm ← min(transpose(L)[:, i])
        for j ∈ 1 .. m
            P[i, j] ← SR if L[i, j] == Sm
            P[i, j] ← L[i, j] otherwise
    P
L = [
    25, 37, 11, 38, 28, 42, 27, 43;
    12, 19, 3, 20, 17, 11, 7, 44;
    12, 28, 21, 42, 14, 34, 47, 39;
    40, 8, 2, 37, 44, 38, 31, 34;
    25, 14, 32, 14, 23, 18, 24, 20;
    2, 30, 22, 19, 1, 43, 35, 30
]
P(L) = [
    25, 37, 25.1458, 38, 28, 42, 27, 43;
    12, 19, 25.1458, 20, 17, 11, 7, 44;
    25.1458, 28, 21, 42, 14, 34, 47, 39;
    40, 8, 25.1458, 37, 44, 38, 31, 34;
    25, 25.1458, 32, 25.1458, 23, 18, 24, 20;
    2, 30, 22, 19, 25.1458, 43, 35, 30
]
# Задание №3
n := 5000
X[1] := 0.9999
X[n] :=
    X[1] ← 0.9
    if n > 1
        for i ∈ 2 .. n
            X[i] ← X[i - 1]^1.5
        return X[i]
    return X[n]
X = [
    0.9; 0.853815; 0.788943; 0.700759; 0.586614; 0.449292; 0.301157; 0.165269; 0.067187; 0.0174152
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]
sum(X[k], k = 1 .. n) = 4.83286
