# Ханаев Михаил 1МО
# Вариант №49
# Лабораторная работа №4
# Задание №1
product(1 - 1/(2*k)^2, k = 1 .. ∞) → 2/π
# Задание №2
sum(e^(-2*k), k = 1 .. ∞) → -e^-2/(e^-2 - 1)
# Задание №3
limit(sqrt(x + a) - sqrt(x), x → ∞) → 0
limit((1 - 4*x)^((1 - x)/x), x → 0) → e^-4
# Задание №4
limit(ln(1 - x)/ctg(π*x), x → 1-) → {
    -∞ if 0 < 1/ctg(π)
    ∞ if 1/ctg(π) < 0
}
limit(x^sin(x), x → 0+) → 1
# Задание №5
d/dx(x*tan(x)/(1 + x^2)) → tan(x)/(x^2 + 1) - 2*x^2*tan(x)/(x^2 + 1)^2 + x*(tan(x)^2 + 1)/(x^2 + 1)
d/dx(x^x) → x*x^(x - 1) + x^x*ln(x)
d/dx(ln(x)*nthroot(x, 3)) → nthroot(x, 3)/x + ln(x)*nthroot(x, 3)/(3*x)
# Задание №6
f(x) := sin(x)/(3 + sin(x))
f'(x) := d/dx(f(x))
f'(0) = 0.333333
f''(x) := d^2/dx^2(f(x))
f''(1) = -0.201965
f'''(x) := d^3/dx^3(f(x))
f'(2) = -0.0816903
# Задание №7
integral((3*x + 1)/(x^2 + 2*x + 2)^2, x) → atan(-x - 1) - x/(x^2 + 2*x + 2) - 5/(2*(x^2 + 2*x + 2))
integral(e^(2*x) + sin(3*x), x) → e^(2*x)/2 - cos(3*x)/3
# Задание №8
integral(ln(3*x)^3, x = 0 .. 1) → ln(729) - 3*ln(3)^2 + ln(3)^3 - 6 = -1.7032
integral(sqrt(a^2 - x^2), x = 0 .. a) → limit(a^2*asin(x/sqrt(a^2))/2 + x*sqrt(a^2 - x^2)/2, x → a-)
integral(x^2*e^(2*x), x = 1 .. 2) → 5*e^4/4 - e^2/4
# Задание №9
atan(x) series, 20 → x - x^3/3 + x^5/5 - x^7/7 + x^9/9 - x^11/11 + x^13/13 - x^15/15 + x^17/17 - x^19/19
(3 + x + 22*x^3) series, 10 → 3 + x + 22*x^3
# Задание №10
x := 2*sqrt(a)/(a^2 + 1)  # error: Эта переменная неопределена.
(sqrt(1 + x) + sqrt(1 - x))/(sqrt(1 + x) - sqrt(1 - x)) → -(sqrt(1 - 2*sqrt(a)/(a^2 + 1)) + sqrt(2*sqrt(a)/(a^2 + 1) + 1))/(sqrt(1 - 2*sqrt(a)/(a^2 + 1)) - sqrt(2*sqrt(a)/(a^2 + 1) + 1)) simplify → (a^2 + 1)*(2*sqrt((a^2 - 2*sqrt(a) + 1)/(a^2 + 1))*sqrt((a^2 + 2*sqrt(a) + 1)/(a^2 + 1)) + 2)/(4*sqrt(a))
# Задание №11
Given
x^4 + 2*(1 + a)*x^3 + (4*a - 1)*x^2 - 2*(1 + a)*x - 4*a == 0
Find(x) → [1, -1, -2, -2*a]
# Задание №12
N := 3
i := 0 .. N - 1
j := 0 .. N - 1
A[i, j] :=
    0
    a if i == j
    -1 if (i == j - 1)
    -b if (i - 1 == j)  # error: Эта переменная неопределена.
A → [a, -1, 0; -b, a, -1; 0, -b, a]
|A| → a^3 - 2*a*b
C[i] :=
    1 if mod(i, 2) == 0
    2 if mod(i, 2) == 1
C → [1; 2; 1]
A^-1*С → [
    -С*(b - a^2)/(a^3 - 2*a*b), -С/(2*b - a^2), С/(a^3 - 2*a*b);
    -b*С/(2*b - a^2), -a*С/(2*b - a^2), -С/(2*b - a^2);
    -b^2*С/(a*(2*b - a^2)), -b*С/(2*b - a^2), С*(b - a^2)/(a*(2*b - a^2))
]
