# Lab №5
# Ханаев Михаил 1МО
# Task №1
i := 1 .. 3
A[i] := i + 3*i
WRITEPRN("Task1.txt") := augment(A[1], A[2], A[3])
# Task №2
i := 0 .. 4
j := 0 .. 4
A[i, j] := i*3 + j - 2
WRITEPRN("Task2.txt") := A
# Task №3
a := READPRN("Task1.txt")
b := READPRN("Task2.txt")
a = [3, 6, 9]
b = [-2, -1, 0, 1, 2; 1, 2, 3, 4, 5; 4, 5, 6, 7, 8; 7, 8, 9, 10, 11; 10, 11, 12, 13, 14]
# Task №4
# [component: outputs [x; y]]
x = [1; 2; 3; 4; 5; 6]
y = [123; 4; 234; 2345; 123; 345]
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# Task №5
b = [-2, -1, 0, 1, 2; 1, 2, 3, 4, 5; 4, 5, 6, 7, 8; 7, 8, 9, 10, 11; 10, 11, 12, 13, 14]
f := WRITEEXCEL(b, "Task5.xlsx")
